f4(x) := x^2 - cos(x)^2 + sin(x) - sqrt(13 + x)
f19(x) := x^2 + x^3 + 35 - x^6
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root(f4(x), x, -5, 0) = -2.10241
root(f19(x), x, -5, 0) = -1.78632
root(f4(x), x, 0, 5) = 1.68927
root(f19(x), x, 0, 5) = 1.88803
